<Lems>

    <!--
    This LEMS file has been generated from:
        PyNN v0.9.5
        libNeuroML v0.2.47
        pyNeuroML v0.3.15
     -->

    <!-- Specify which component to run -->
    <Target component="Sim_PyNN_NeuroML2_Export"/>

    <!-- Include core NeuroML2 ComponentType definitions -->
    <Include file="Cells.xml"/>
    <Include file="Networks.xml"/>
    <Include file="Simulation.xml"/>

    <Include file="PyNN.xml"/>
    <Include file="PyNN_NeuroML2_Export.net.nml"/>

    <Simulation id="Sim_PyNN_NeuroML2_Export" length="1000.0ms" step="0.1ms" target="PyNN_NeuroML2_Export" seed="12345">  <!-- Note seed: ensures same random numbers used every run -->

        <EventOutputFile id="Spikes_file_input" fileName="input.spikes" format="TIME_ID">
            <EventSelection id="0" select="input/0/IF_curr_exp_input" eventPort="spike"/>
            <EventSelection id="1" select="input/1/IF_curr_exp_input" eventPort="spike"/>
            <EventSelection id="2" select="input/2/IF_curr_exp_input" eventPort="spike"/>
            <EventSelection id="3" select="input/3/IF_curr_exp_input" eventPort="spike"/>
            <EventSelection id="4" select="input/4/IF_curr_exp_input" eventPort="spike"/>
        </EventOutputFile>

        <EventOutputFile id="Spikes_file_output" fileName="output.spikes" format="TIME_ID">
            <EventSelection id="1" select="output/1/IF_curr_exp_output" eventPort="spike"/>
            <EventSelection id="2" select="output/2/IF_curr_exp_output" eventPort="spike"/>
            <EventSelection id="3" select="output/3/IF_curr_exp_output" eventPort="spike"/>
            <EventSelection id="4" select="output/4/IF_curr_exp_output" eventPort="spike"/>
            <EventSelection id="0" select="output/0/IF_curr_exp_output" eventPort="spike"/>
        </EventOutputFile>

    </Simulation>

</Lems>
